New "Line.l73" phases=3 bus1=72.1.2.3 bus2=76.1.2.3 linecode=3 Seasons=1 Ratings=[400,] normamps=400 emergamps=600 length=0.2
New "Line.l76" phases=3 bus1=76.1.2.3 bus2=77.1.2.3 linecode=6 Seasons=1 Ratings=[400,] normamps=400 emergamps=600 length=0.4
New "Line.l78" phases=3 bus1=77.1.2.3 bus2=78.1.2.3 linecode=6 Seasons=1 Ratings=[400,] normamps=400 emergamps=600 length=0.1
New "Line.l79" phases=3 bus1=78.1.2.3 bus2=79.1.2.3 linecode=6 Seasons=1 Ratings=[400,] normamps=400 emergamps=600 length=0.225
New "Line.l80" phases=3 bus1=78.1.2.3 bus2=80.1.2.3 linecode=6 Seasons=1 Ratings=[400,] normamps=400 emergamps=600 length=0.475
New "Line.l81" phases=3 bus1=80.1.2.3 bus2=81.1.2.3 linecode=6 Seasons=1 Ratings=[400,] normamps=400 emergamps=600 length=0.175
New "Line.l82" phases=3 bus1=81.1.2.3 bus2=82.1.2.3 linecode=6 Seasons=1 Ratings=[400,] normamps=400 emergamps=600 length=0.25
New "Line.l84" phases=3 bus1=82.1.2.3 bus2=83.1.2.3 linecode=6 Seasons=1 Ratings=[400,] normamps=400 emergamps=600 length=0.25
New "Line.l83" phases=1 bus1=81.3 bus2=84.3 linecode=11 Seasons=1 Ratings=[400,] normamps=400 emergamps=600 length=0.675
New "Line.l85" phases=1 bus1=84.3 bus2=85.3 linecode=11 Seasons=1 Ratings=[400,] normamps=400 emergamps=600 length=0.475
New "Line.l77" phases=3 bus1=76.1.2.3 bus2=86.1.2.3 linecode=3 Seasons=1 Ratings=[400,] normamps=400 emergamps=600 length=0.7
New "Line.l86" phases=3 bus1=86.1.2.3 bus2=87.1.2.3 linecode=6 Seasons=1 Ratings=[400,] normamps=400 emergamps=600 length=0.45
New "Line.l87" phases=1 bus1=87.1 bus2=88.1 linecode=9 Seasons=1 Ratings=[400,] normamps=400 emergamps=600 length=0.175
New "Line.l88" phases=3 bus1=87.1.2.3 bus2=89.1.2.3 linecode=6 Seasons=1 Ratings=[400,] normamps=400 emergamps=600 length=0.275
New "Line.l89" phases=1 bus1=89.2 bus2=90.2 linecode=10 Seasons=1 Ratings=[400,] normamps=400 emergamps=600 length=0.25
New "Line.l90" phases=3 bus1=89.1.2.3 bus2=91.1.2.3 linecode=6 Seasons=1 Ratings=[400,] normamps=400 emergamps=600 length=0.225
New "Line.l91" phases=1 bus1=91.3 bus2=92.3 linecode=11 Seasons=1 Ratings=[400,] normamps=400 emergamps=600 length=0.3
New "Line.l92" phases=3 bus1=91.1.2.3 bus2=93.1.2.3 linecode=6 Seasons=1 Ratings=[400,] normamps=400 emergamps=600 length=0.225
New "Line.l93" phases=1 bus1=93.1 bus2=94.1 linecode=9 Seasons=1 Ratings=[400,] normamps=400 emergamps=600 length=0.275
New "Line.l94" phases=3 bus1=93.1.2.3 bus2=95.1.2.3 linecode=6 Seasons=1 Ratings=[400,] normamps=400 emergamps=600 length=0.3
New "Line.l95" phases=1 bus1=95.2 bus2=96.2 linecode=10 Seasons=1 Ratings=[400,] normamps=400 emergamps=600 length=0.2
