New "Line.650632" phases=3 bus1=rg60.1.2.3 bus2=632.1.2.3 linecode=mtx601 Seasons=1 Ratings=[400,] normamps=400 emergamps=600 length=2000 units=ft
New "Line.632670" phases=3 bus1=632.1.2.3 bus2=670.1.2.3 linecode=mtx601 Seasons=1 Ratings=[400,] normamps=400 emergamps=600 length=667 units=ft
New "Line.632633" phases=3 bus1=632.1.2.3 bus2=633.1.2.3 linecode=mtx602 Seasons=1 Ratings=[400,] normamps=400 emergamps=600 length=500 units=ft
New "Line.632645" phases=2 bus1=632.3.2 bus2=645.3.2 linecode=mtx603 Seasons=1 Ratings=[400,] normamps=400 emergamps=600 length=500 units=ft
New "Line.645646" phases=2 bus1=645.3.2 bus2=646.3.2 linecode=mtx603 Seasons=1 Ratings=[400,] normamps=400 emergamps=600 length=300 units=ft
