New "LineCode.ug_600_al_xlpe_35kv" nphases=3 r1=0.2666 x1=0.3506 r0=0.7207 x0=0.1272 C1=346.37 C0=346.37 units=mi baseFreq=60 normamps=508
New "LineCode.ug_1000_al_xlpe_35kv" nphases=3 r1=0.2101 x1=0.3047 r0=0.5433 x0=0.1093 C1=462 C0=462 units=mi baseFreq=60 normamps=640
New "LineCode.ug_1/0_al_xlpe_35kv_1_phase" nphases=1 r1=1.59 x1=0.57 r0=1.59 x0=0.57 C1=185 C0=185 units=mi baseFreq=60 normamps=200
New "LineCode.busbar" nphases=3 r1=0.005 x1=0 r0=0.005 x0=0 units=kft baseFreq=60 normamps=2000
New "LineCode.ug_1/0_al_xlpe_35kv" nphases=3 r1=0.9821 x1=0.4794 r0=1.7978 x0=0.1922 C1=185 C0=185 units=mi baseFreq=60 normamps=200
New "LineCode.sweetbriar" nphases=1 r1=0.5333 x1=0.1399 r0=0.5333 x0=0.1399 units=mi normamps=299 emergamps="299 1.25 *"
New "LineCode.kronkron1/0" nphases=1 rmatrix=[  0.36742424 ] xmatrix=[  0.07856808 ] cmatrix=[ 15.00000000 ] units=kft normamps=202 emergamps="202 1.25 *"
New "LineCode.1/0-3phase" nphases=3 rmatrix=[  0.20176167   0.01804955   0.01804955 |  0.01804955   0.20176167   0.01804955 |  0.01804955   0.01804955   0.20176167 ] xmatrix=[  0.28577060   0.25445134   0.24648656 |  0.25445134   0.28577060   0.25445134 |  0.24648656   0.25445134   0.28577060 ] cmatrix=[ 15.00000000  -7.00000000  -7.00000000 | -7.00000000  15.00000000  -7.00000000 | -7.00000000  -7.00000000  15.00000000 ] units=kft normamps=202 emergamps="202 1.25 *"
New "LineCode.2/0_2/0" nphases=1 rmatrix=[  0.29128788 ] xmatrix=[  0.07852210 ] cmatrix=[ 15.00000000 ] units=kft normamps=230 emergamps="230 1.25 *"
New "LineCode.2/0_2/0-3ph" nphases=3 rmatrix=[  0.16369349   0.01804955   0.01804955 |  0.01804955   0.16369349   0.01804955 |  0.01804955   0.01804955   0.16369349 ] xmatrix=[  0.28304078   0.25174451   0.24377973 |  0.25174451   0.28304078   0.25174451 |  0.24377973   0.25174451   0.28304078 ] cmatrix=[ 15.00000000  -7.00000000  -7.00000000 | -7.00000000  15.00000000  -7.00000000 | -7.00000000  -7.00000000  15.00000000 ] units=kft normamps=230 emergamps="230 1.25 *"
New "LineCode.4/0_4/0" nphases=1 rmatrix=[  0.18333334 ] xmatrix=[  0.07840812 ] cmatrix=[ 15.00000000 ] units=kft normamps=299 emergamps="299 1.25 *"
New "LineCode.4/0_4/0-3ph" nphases=3 rmatrix=[  0.10971621   0.01804955   0.01804955 |  0.01804955   0.10971621   0.01804955 |  0.01804955   0.01804955   0.10971621 ] xmatrix=[  0.27765665   0.24641736   0.23845259 |  0.24641736   0.27765665   0.24641736 |  0.23845259   0.24641736   0.27765665 ] cmatrix=[ 15.00000000  -7.00000000  -7.00000000 | -7.00000000  15.00000000  -7.00000000 | -7.00000000  -7.00000000  15.00000000 ] units=kft normamps=299 emergamps="299 1.25 *"
New "LineCode.500_500-3ph" nphases=3 rmatrix=[  0.05706470   0.01804955   0.01804955 |  0.01804955   0.05706470   0.01804955 |  0.01804955   0.01804955   0.05706470 ] xmatrix=[  0.26620988   0.23623511   0.22827034 |  0.23623511   0.26620988   0.23623511 |  0.22827034   0.23623511   0.26620988 ] cmatrix=[ 15.00000000  -7.00000000  -7.00000000 | -7.00000000  15.00000000  -7.00000000 | -7.00000000  -7.00000000  15.00000000 ] units=kft normamps=483 emergamps="483 1.25 *"
New "LineCode.750_750-3ph" nphases=3 rmatrix=[  0.04437530   0.01804955   0.01804955 |  0.01804955   0.04437530   0.01804955 |  0.01804955   0.01804955   0.04437530 ] xmatrix=[  0.26150996   0.24834508   0.24038031 |  0.24834508   0.26150996   0.24834508 |  0.24038031   0.24834508   0.26150996 ] cmatrix=[ 15.00000000  -7.00000000  -7.00000000 | -7.00000000  15.00000000  -7.00000000 | -7.00000000  -7.00000000  15.00000000 ] units=kft normamps=580 emergamps="580 1.25 *"
New "LineCode.unknown" nphases=3 rmatrix=[  0.04437530   0.01804955   0.01804955 |  0.01804955   0.04437530   0.01804955 |  0.01804955   0.01804955   0.04437530 ] xmatrix=[  0.26150996   0.24834508   0.24038031 |  0.24834508   0.26150996   0.24834508 |  0.24038031   0.24834508   0.26150996 ] cmatrix=[ 15.00000000  -7.00000000  -7.00000000 | -7.00000000  15.00000000  -7.00000000 | -7.00000000  -7.00000000  15.00000000 ] units=kft normamps=580 emergamps="580 1.25 *"
